/clear
/title,Quench_Analysis_1D_1D_1D
/prep7
electric_analysis=1
number_of_windings =9
division_long_side =200
division_short_side =60
division_radius =40
number_of_windings_in_reel =3
elem_per_line =1
transverse_dimension_winding =0.000941
transverse_division_insulation =5
G10_element_area =2.389335621751848e-06
division_per_winding = 10
length_per_winding = 2.0

*do,i,1,9
et,i,link68
*enddo
et,19,link33


reel_number = 1
is_reel_number_odd = mod(reel_number, 2)
kp_per_winding = division_per_winding+1
! feature which could be added
elem_per_line = 1
x=0
y=0
z=0

winding_counter = 1
*do,a,1,number_of_windings/number_of_windings_in_reel
  *do,i,1,number_of_windings_in_reel
    allsel
    *get,kp_first_winding_i,kp,,count
    kp_first_winding_i = kp_first_winding_i + 1
    *do,j,1,kp_per_winding,1
      allsel
      *get,knum,kp,,count
        k,knum+1,(j-1)*(length_per_winding)/(division_per_winding),y,z
    *enddo
    allsel
    *get,kp_last_winding_i,kp,,count
    allsel
    *get,knum,kp,,count
    line_counter = knum - division_per_winding
    type,winding_counter
    *do,k,line_counter,line_counter+division_per_winding-1,1
      l,k,k+1,elem_per_line
      allsel
      *get,lnum,line,,count
      lmesh,lnum
    *enddo
    allsel
    *get,lnum,line,,count
    lsel,s,line,,lnum+1-division_per_winding,lnum
    allsel,below,line
    cm,winding%winding_counter%,line

    x = x
    *if,is_reel_number_odd,ne,0,then
      y = y + transverse_dimension_winding
    *else
      y = y - transverse_dimension_winding
    *endif
    z = z
    winding_counter = winding_counter + 1
  *enddo


  ! winding_counter = winding_counter + 1
  reel_number = reel_number + 1
  is_reel_number_odd = mod(reel_number, 2)

  *if,is_reel_number_odd,ne,0,then
    y = 0
  *else
    y = y - transverse_dimension_winding
  *endif
  z = z + transverse_dimension_winding
*enddo

*if,number_of_windings,gt,1,then
  allsel
  kp_no_in_reel = 0
  *do,b,1,number_of_windings/number_of_windings_in_reel
    *do,i,1,number_of_windings_in_reel-1
      kp_number = ((i-1)*kp_per_winding)+1+ kp_no_in_reel
      type,number_of_windings*2+1
      *do,j,kp_number,kp_per_winding+kp_number-1,1
        l,j,j+(kp_per_winding),transverse_division_insulation
        allsel
        *get,lnum,line,,count
        lmesh,lnum
      *enddo
    *enddo
    kp_no_in_reel = kp_no_in_reel + kp_per_winding*number_of_windings_in_reel
  *enddo

  allsel
  low_kp_number = 1
  high_kp_number = kp_per_winding*(number_of_windings_in_reel*2-1)+1

  low_kp_counter = low_kp_number
  high_kp_counter = high_kp_number

  *do,i,1,number_of_windings/number_of_windings_in_reel-1
    *do,j,1,number_of_windings_in_reel
      type,number_of_windings*2+1
      real,number_of_windings*2+1
      *do,k,1,kp_per_winding,1
        l,low_kp_number+(k-1),high_kp_number+(k-1),transverse_division_insulation
        allsel
        *get,lnum,line,,count
        lmesh,lnum
      *enddo
      low_kp_number = low_kp_number + kp_per_winding
      high_kp_number = high_kp_number - kp_per_winding
    *enddo
    low_kp_number = low_kp_counter + i*(kp_per_winding*number_of_windings_in_reel)
    high_kp_number = high_kp_counter + i*(kp_per_winding*number_of_windings_in_reel)
  *enddo
*endif

*do,i,1,number_of_windings
  *dim,node_list_winding_%i%,array,division_per_winding+1,1
  cmsel,s,winding%i%
  allsel,below,line
  *vget,node_list_winding_%i%,node,,nlist
  *mwrite,node_list_winding_%i%,Winding_%i%,txt
  (1E20.10)
*enddo

csys,0
allsel
*get,nnum_windings,node,,count
*dim,node_loc_windings,array,nnum_windings,4
*vget,node_loc_windings(1,1),node,,nlist
*vget,node_loc_windings(1,2),node,,loc,x
*vget,node_loc_windings(1,3),node,,loc,y
*vget,node_loc_windings(1,4),node,,loc,z
*mwrite,node_loc_windings,Node_Position,txt
(4E20.10)

allsel
*get,nnode,node,,count
*cfopen,Nnode,txt
*vwrite,nnode
(1(ES16.7))
*cfclose

*cfopen,Process_Finished,txt
*vwrite,1
(1(ES16.7))
*cfclose
