/clear
/title,Quench_Analysis_1D_1D_1D
/prep7
number_of_windings =9
division_long_side =100
division_short_side =30
division_radius =25
number_of_windings =9
number_of_windings_in_reel =3
elem_per_line =1
transverse_dimension_winding =0.000941
transverse_division_insulation =4
G10_element_area =5.926025477711267e-06

/input,1D_1D_1D_Material_Properties_Superconducting_NonLinear,inp,C:\gitlab\steam-ansys-modelling\source\APDL\1D_1D_1D\Input_Files
/input,1D_1D_1D_Geometry_quadrupole,inp,C:\gitlab\steam-ansys-modelling\source\APDL\1D_1D_1D\Input_Files

nsel,s,node,,99,190
esln,s,1,all
emodif,all,type,1
emodif,all,real,1
emodif,all,mat,1
nsel,s,node,,361,362
cp,next,volt,all
cp,next,temp,all
nsel,s,node,,722,723
cp,next,volt,all
cp,next,temp,all
nsel,s,node,,1083,1084
cp,next,volt,all
cp,next,temp,all
nsel,s,node,,1444,1445
cp,next,volt,all
cp,next,temp,all
nsel,s,node,,1805,1806
cp,next,volt,all
cp,next,temp,all
nsel,s,node,,2166,2167
cp,next,volt,all
cp,next,temp,all
nsel,s,node,,2527,2528
cp,next,volt,all
cp,next,temp,all
nsel,s,node,,2888,2889
cp,next,volt,all
cp,next,temp,all
FINISH

/SOL
antype,4
trnopt,full
kbc,1
eqslv,sparse
bcsoption,,default
lumpm,0
autots,on
solcontrol,on,on
neqit,1000
lnsrch,on
rescontrol,define,none,none,1
tintp,,,,1


cmsel,s,winding2
alls,below,line
!esel,s,elem,,541,640
bfe,all,hgen,,639.95

time,0.84 ! [s]
allsel
ic,all,temp,1.9


nsel,s,node,,1,1
f,all,amps,100.0

nsel,s,node,,3249,3249
d,all,volt,0

allsel
solve
